# В начале опишем все необходимые для вычисления F - критерия функции
Mean_total(M) := SrAr ← mean(M)
SSB(M) := sum(rows(M)*(Sr_col ← mean(M[:, i]) - Mean_total(M))^2, i = 0 .. cols(M) - 1)
SSW(M) := sum(sum((M[i, j] - (Sr_Col ← mean(M[:, j])))^2, i = 0 .. rows(M) - 1), j = 0 .. cols(M) - 1)
MSB(M) := SSB(M)/(cols(M) - 1)
MSW(M) := SSW(M)/(cols(M)*rows(M) - cols(M))
F(M) := MSB(M)/MSW(M)
df1(M) := cols(M) - 1
df2(M) := cols(M)*rows(M) - cols(M)
SSE(M) := SSB(M) + SSW(M)
η(M) := sqrt(SSB(M)/SSE(M))
Determination_coefficient(M) := η(M)^2
# Задание 11
A_11 := [40, 24, 46, 20, 35; 29, 27, 20, 39, 45; 11, 31, 17, 37, 39; 17, 21, 38, 33, 21]
A_11 := transpose(A_11)
F(A_11) = 0.545723
df1(A_11) = 3
df2(A_11) = 16
# Вычисленное значение F - критерия меньше табличного, равного 3.24, следовательно различия прироста бычков в зависимости от группы нельзя считать достоверными.
# Задание 12
A_12 := [
    26.1, 29.2, 30, 27.3;
    25, 24.3, 28.5, 29;
    27.2, 26.4, 31, 26.4;
    23.6, 27.2, 25.2, 24.8;
    30, 33, 36, 29.8;
    23, 26, 26, 24.8
]
A_12 := transpose(A_12)
F(A_12) = 6.33533
df1(A_12) = 5
df2(A_12) = 18
# Вычисленное значение F - критерия больше табличного, равного 2.77, следовательно на различия в расстоянии, которое пролетает мяч, действительно влияет технология изготовления.
η(A_12) = 0.798534
# На основании значения эмпирического корреляционного отношения можно сделать вывод, что между расстоянием, которое пролетает мяч и технологией его изготовления существует тесная связь.
Determination_coefficient(A_12) = 0.637657
# Расстояние, которое пролетает мяч зависит на 64% от технологии изготовления и на 36% от других факторов.
# Задание 13
A_13 := [
    16.2, 15.8, 14, 15.1;
    17.5, 18.9, 16.7, 18.2;
    18.9, 18.7, 19.3, 20.6;
    26.3, 24.5, 24.3, 25.5;
    23, 23.9, 24.2, 23.9
]
A_13 := transpose(A_13)
F(A_13) = 91.9
df1(A_13) = 4
df2(A_13) = 15
# Вычисленное значение F - критерия больше табличного, равного 3.06, следовательно влияние минеральных удобрений на урожайность яровой пшеницы можно считать достоверным.
η(A_13) = 0.980201
# На основании значения эмпирического корреляционного отношения можно сделать вывод, что между видом удобрения и урожайностью яровой пшеницы существует тесная связь.
Determination_coefficient(A_13) = 0.960795
# Урожайность яровой пшеницы зависит на 96% от использованного удобрения и на 4% от других факторов.
# Задание 14
A_14 := [19, 20, 16; 23, 20, 15; 26, 32, 18; 18, 37, 26; 20, 40, 19; 20, 24, 17; 18, 22, 19; 35, 18, 18]
F(A_14) = 3.393
df1(A_14) = 2
df2(A_14) = 21
# Вычисленное значение F - критерия меньше табличного, равного 3.46, следовательно, влияние типа магазина на товарооборот нельзя считать достоверным.
# Задание 15
A_15 := [19, 20, 19; 23, 20, 23; 26, 32, 18; 18, 37, 26; 20, 40, 20; 20, 24, 20; 18, 22, 18; 35, 18, 35]
F(A_15) = 1.0389
df1(A_15) = 2
df2(A_15) = 21
# Расчетное значение F - критерия Фишера меньше табличного, равного 3.47, следовательно влияние типа магазина на товарооборот нельзя считать достоверным.
# Задание 16
A_16 := [
    0.9, 1, 1.3, 1.8;
    0.8, 0.7, 1.5, 1.9;
    1, 1.3, 1.6, 1.1;
    1.3, 1, 1.4, 1.4;
    1.4, 1.3, 1.2, 1.3;
    0.8, 1.3, 1.1, 1.9
]
F(A_16) = 5.11098
df1(A_16) = 3
df2(A_16) = 20
# Расчетное значение F - критерия Фишера меньше табличного, равного 3.1, следовательно влияние используемой технологии на урожайность выращиваемой культуры нельзя считать достоверным.
# Задание 17
A_17 := [1.25, 1.32, 1.28, 1.26, 1.29; 1.12, 1.15, 1.26, 1.19, 1.21; 1.32, 1.33, 1.34, 1.29, 1.30]
A_17 := transpose(A_17)
F(A_17) = 16.4428
df1(A_17) = 2
df2(A_17) = 12
# Расчетное значение F - критерия Фишера больше табличного, равного 3.88, следовательно между видом материала и износостойкостью детали существует статистически значимая связь.
η(A_17) = 0.855952
# На основании значения эмпирического корреляционного отношения можно сделать вывод о том, что между материалом, из которого изготовлена деталь и ее износостойкостью существует тесная связь.
Determination_coefficient(A_17) = 0.732654
# Износостойкость детали зависит на 73% от материала и на 27% от других факторов.
# Задание 18
A_18 := [8.1, 3.9, 4.8; 7.5, 4.4, 6; 5.8, 2.8, 4.4; 6.6, 3.4, 5.8; 5.9, 4.8, 6.2; 4.8, 3.6, 4.9]
F(A_18) = 12.4766
df1(A_18) = 2
df2(A_18) = 15
# Расчетное значение F - критерия больше табличного, равного 3.68, следовательно, расположение рекламных щитов действительно влияет на объем продаж.
η(A_18) = 0.790291
# На основании значения эмпирического корреляционного значения можно сделать вывод о том, что между расположением рекламных щитов и объемом продаж существует тесная связь.
Determination_coefficient(A_18) = 0.62456
# Объем продаж зависит на 62% от расположения рекламных щитов и на 38% от других факторов.
# Задание 19
A_19 := [
    72.1, 75.5, 72.9, 76;
    78.9, 82.7, 73.9, 81.8;
    72.5, 70.1, 73.3, 75.3;
    77.5, 74.1, 72.7, 74.2;
    77, 82.8, 85.5, 86;
    75.6, 80.5, 80.7, 78.4
]
A_19 := transpose(A_19)
F(A_19) = 6.99472
df1(A_19) = 5
df2(A_19) = 18
# Расчетное значение F - критерия больше табличного, равного 2.77, следовательно, выбор поставщика действительно влияет на затраты на лицензионное ПО.
η(A_19) = 0.812532
# На основании эмпирического корреляционного отношения можно сделать вывод о том, что между выбором поставщика и потенциальными затратами на лицензионное ПО существует тесная связь.
Determination_coefficient(A_19) = 0.660208
# Потенциальные затраты на лицензионное ПО зависят на 66% от выбора поставщика и на 34% от других факторов.
# Задание 20
A_20 := [
    465, 460, 470, 465, 445;
    470, 460, 470, 465, 420;
    470, 460, 465, 465, 395;
    465, 460, 470, 465, 395;
    470, 460, 455, 465, 440;
    455, 445, 455, 450, 410;
    460, 445, 455, 455, 395;
    460, 445, 455, 450, 435;
    455, 445, 455, 455, 445;
    460, 445, 455, 455, 395
]
F(A_20) = 26.0136
df1(A_20) = 4
df2(A_20) = 45
# Расчетное значение F -критерия Фишера больше табличного равного 2.58, следовательно, между выбором лаборатории и пределе прочности сплава при растяжении существует статистически значимая связь.
η(A_20) = 0.835522
# На основании значения эмпирического корреляционного отношения можно сделать вывод о тои, что между выбором лаборатории и прочностью сплава при растяжении существует тесная связь.
Determination_coefficient(A_20) = 0.698097
# Прочность сплава зависит на 70% от выбора лаборатории и на 30% от других факторов.
# Задание 21
A_21 := [
    13.75, 14.25, 14, 15, 14.5, 13.5;
    13.75, 13, 14, 14, 14, 12.25;
    13.5, 12.75, 13.51, 13.75, 14, 12.25;
    13.5, 12.5, 13.5, 13.59, 13.9, 12;
    13, 12.5, 13.5, 13.25, 13.75, 12;
    13, 12.4, 13.25, 12.97, 13.25, 12;
    13, 12.3, 13, 12.5, 13, 12;
    12.75, 11.9, 12.5, 12.25, 12.5, 11.9;
    12.5, 11.9, 12.5, 11.89, 12.45, 11.9
]
F(A_21) = 4.82938
df1(A_21) = 5
df2(A_21) = 48
# Расчетное значение F - критерия больше табличного, равного 2.56, следовательно, нулевая гипотеза H0 о случайном характере влияния города на размер процентной ставки отклоняется.
η(A_21) = 0.578525
# На основе значения эмпирического корреляционного отношения можно сделать вывод о том, что между городом и размером процентной ставки существует умеренно тесная связь.
Determination_coefficient(A_21) = 0.334691
# Процентная ставка зависит на 33% от города и на 67% от других факторов.
# Задание 22
A_22 := [140, 150, 148, 150; 144, 149, 149, 155; 142, 152, 146, 154; 145, 150, 147, 152]
F(A_22) = 22.4395
df1(A_22) = 3
df2(A_22) = 12
# Расчетное значение F - критерия больше табличного, равного 3.49, следовательно, между объемом работ и работающей бригадой существует статистически значимая связь.
η(A_22) = 0.921255
# На основании эмпирического корреляционного отношения можно сделать вывод о том, что между выполненным объемом работ и работающей бригадой существует тесная связь.
Determination_coefficient(A_22) = 0.848711
# Объем работ зависит на 85% от работающей бригады и на 15% от других факторов.
