Y
Mean_total(M) := SrAr ← mean(M)
SSB(M) := sum(rows(M)*(Sr_col ← mean(M[:, i]) - Mean_total(M))^2, i = 0 .. cols(M) - 1)
SSW(M) := sum(sum((M[i, j] - (Sr_Col ← mean(M[:, j])))^2, i = 0 .. rows(M) - 1), j = 0 .. cols(M) - 1)
MSB(M) := SSB(M)/(cols(M) - 1)
MSW(M) := SSW(M)/(cols(M)*rows(M) - cols(M))
F(M) := MSB(M)/MSW(M)
df1(M) := cols(M) - 1
df2(M) := cols(M)*rows(M) - cols(M)
SSE(M) := SSB(M) + SSW(M)
η(M) := sqrt(SSB(M)/SSE(M))
Determination_coefficient(M) := η(M)^2
A_12 := [
    26.1, 29.2, 30, 27.3;
    25, 24.3, 28.5, 29;
    27.2, 26.4, 31, 26.4;
    23.6, 27.2, 25.2, 24.8;
    30, 33, 36, 29.8;
    23, 26, 26, 24.8
]
A_12 := transpose(A_12)
F(A_12) = 6.33533
df1(A_12) = 5
df2(A_12) = 18
η(A_12) = 0.798534
Determination_coefficient(A_12) = 0.637657
A_13 := [
    16.2, 15.8, 14, 15.1;
    17.5, 18.9, 16.7, 18.2;
    18.9, 18.7, 19.3, 20.6;
    26.3, 24.5, 24.3, 25.5;
    23, 23.9, 24.2, 23.9
]
A_13 := transpose(A_13)
F(A_13) = 91.9
df1(A_13) = 4
df2(A_13) = 15
η(A_13) = 0.980201
Determination_coefficient(A_13) = 0.960795
A_14 := [19, 20, 16; 23, 20, 15; 26, 32, 18; 18, 37, 26; 20, 40, 19; 20, 24, 17; 18, 22, 19; 35, 18, 18]
F(A_14) = 3.393
df1(A_14) = 2
df2(A_14) = 21
A_15 := [19, 20, 19; 23, 20, 23; 26, 32, 18; 18, 37, 26; 20, 40, 20; 20, 24, 20; 18, 22, 18; 35, 18, 35]
F(A_15) = 1.0389
df1(A_15) = 2
df2(A_15) = 21
A_16 := [
    0.9, 1, 1.3, 1.8;
    0.8, 0.7, 1.5, 1.9;
    1, 1.3, 1.6, 1.1;
    1.3, 1, 1.4, 1.4;
    1.4, 1.3, 1.2, 1.3;
    0.8, 1.3, 1.1, 1.9
]
F(A_16) = 5.11098
df1(A_16) = 3
df2(A_16) = 20
A_17 := [1.25, 1.32, 1.28, 1.26, 1.29; 1.12, 1.15, 1.26, 1.19, 1.21; 1.32, 1.33, 1.34, 1.29, 1.30]
A_17 := transpose(A_17)
F(A_17) = 16.4428
df1(A_17) = 2
df2(A_17) = 12
η(A_17) = 0.855952
Determination_coefficient(A_17) = 0.732654
A_18 := [8.1, 3.9, 4.8; 7.5, 4.4, 6; 5.8, 2.8, 4.4; 6.6, 3.4, 5.8; 5.9, 4.8, 6.2; 4.8, 3.6, 4.9]
F(A_18) = 12.4766
df1(A_18) = 2
df2(A_18) = 15
η(A_18) = 0.790291
Determination_coefficient(A_18) = 0.62456
A_19 := [
    72.1, 75.5, 72.9, 76;
    78.9, 82.7, 73.9, 81.8;
    72.5, 70.1, 73.3, 75.3;
    77.5, 74.1, 72.7, 74.2;
    77, 82.8, 85.5, 86;
    75.6, 80.5, 80.7, 78.4
]
A_19 := transpose(A_19)
F(A_19) = 6.99472
df1(A_19) = 5
df2(A_19) = 18
η(A_19) = 0.812532
Determination_coefficient(A_19) = 0.660208
A_20 := [
    465, 460, 470, 465, 445;
    470, 460, 470, 465, 420;
    470, 460, 465, 465, 395;
    465, 460, 470, 465, 395;
    470, 460, 455, 465, 440;
    455, 445, 455, 450, 410;
    460, 445, 455, 455, 395;
    460, 445, 455, 450, 435;
    455, 445, 455, 455, 445;
    460, 445, 455, 455, 395
]
F(A_20) = 26.0136
df1(A_20) = 4
df2(A_20) = 45
η(A_20) = 0.835522
Determination_coefficient(A_20) = 0.698097
A_21 := [
    13.75, 14.25, 14, 15, 14.5, 13.5;
    13.75, 13, 14, 14, 14, 12.25;
    13.5, 12.75, 13.51, 13.75, 14, 12.25;
    13.5, 12.5, 13.5, 13.59, 13.9, 12;
    13, 12.5, 13.5, 13.25, 13.75, 12;
    13, 12.4, 13.25, 12.97, 13.25, 12;
    13, 12.3, 13, 12.5, 13, 12;
    12.75, 11.9, 12.5, 12.25, 12.5, 11.9;
    12.5, 11.9, 12.5, 11.89, 12.45, 11.9
]
F(A_21) = 4.82938
df1(A_21) = 5
df2(A_21) = 48
η(A_21) = 0.578525
Determination_coefficient(A_21) = 0.334691
A_22 := [140, 150, 148, 150; 144, 149, 149, 155; 142, 152, 146, 154; 145, 150, 147, 152]
F(A_22) = 22.4395
df1(A_22) = 3
df2(A_22) = 12
η(A_22) = 0.921255
Determination_coefficient(A_22) = 0.848711
