s :=
    s ← 0
    for x ∈ 1 .. 25
        s ← s + x
s = 325
s :=
    s ← 0
    x ← 1
    for i ∈ 1 .. 25
        s ← s + x
        x ← x*(-2)
s = -33554432
s :=
    s ← 0
    a ← 3
    b ← 4
    c ← 2
    for i ∈ 1 .. 25
        s ← (a + b)/c
        a ← a*2
        b ← b - 1
        c ← c + 2
s = 52
s :=
    s ← 0
    i ← 2
    for x ∈ 1 .. 64
        s ← s + i^x
    s ← s*0.3
s = 1.1068e19
vektor :=
    v ← [0; 0; 0]
    for i ∈ 1 .. 3
        v[i] ← i
    vektor ← [v[1]; v[2]; v[3]]
    vektor
vektor = [1; 2; 3]
vektor :=
    v ← [0; 0; 0]
    for i ∈ 1 .. 3
        v[i] ← 4 - i
    vektor ← [v[1]; v[2]; v[3]]
    vektor
vektor = [3; 2; 1]
vektor :=
    v ← [0; 0; 0]
    for i ∈ 1 .. 3
        v[i] ← i^2
    vektor ← [v[1]; v[2]; v[3]]
    vektor
vektor = [1; 4; 9]
