φ(x) :=
    if x < 0
        0
    if 0 ≤ x ≤ π
        0.5*sin(x)
    if x > π
        0
a := 1
b := 2
p := 0.1
# [plot: φ(x) vs x]
integral(φ(x), x = -∞ .. ∞) = 1.00005
F(x) := integral(φ(x), x = -∞ .. x)
# [plot: F(x) vs x]
M := integral(x*φ(x), x = -∞ .. ∞)
M = 1.57085
D := integral(x^2*φ(x), x = -∞ .. ∞) - M^2
D = 0.467254
σ := sqrt(D)
σ = 0.68356
p1 := integral(φ(x), x = a .. b)
p1 = 0.478225
p2 := F(b) - F(a)
p2 = 0.478228
root(F(x) - 0.5, x, 0, 2) = 1.57078
root(F(x) - p, x, 0, 2) = 0.643558
