f(x) :=
    if x < 0
        0
    if 0 ≤ x ≤ π
        0.5*sin(x)
    if x > π
        0
p := 0.1
a := 1
b := 2
# [plot: f(x) vs x]
integral(f(x), x = -∞ .. ∞) = 1.00005
F(x) := integral(f(t), t = -∞ .. x)
# [plot: F(x) vs x]
M := integral(x*f(x), x = -∞ .. ∞) = 1.57085
D := integral(x^2*f(x), x = -∞ .. ∞) - M^2 = 0.467254
σ := sqrt(D) = 0.68356
p1 := integral(f(x), x = a .. b)
p1 = 0.478225
p2 := F(b) - F(a)
p2 = 0.478228
root(F(x) - p, x, 0, 2) = 0.643558
root(F(x) - 0.5, x, 0, 2) = 1.57078
