X := READPRN("n1.prn")
Y := READPRN("n2.prn")
n1 := length(X) = 26
n2 := length(Y) = 27
X = [29.8; 29.5; 30.4; 30.4; 28.5; 35.6; 29.3; 28; 26.4; 24.2; 32.3; 26.2; 22.9; 25.9; 27.5; 20.2; 28.4; 22.7; 21.3; 23.3; 23.2; 29.7; 24; 26.5; 28.5; 24.7]
Y = [27.9; 32.9; 29.1; 31.1; 28.9; 34.1; 35.7; 23.7; 33.9; 25.2; 25.3; 29.3; 29.7; 29.9; 36.7; 24.7; 32.5; 30.4; 26.4; 31.1; 28.8; 34.7; 32.9; 36.1; 30.5; 39.7; 30.8]
k1 := n1 - 1 = 25
k2 := n2 - 1 = 26
α := 0.05
p := 1 - α = 0.95
x1 := mean(X) = 26.9
y1 := mean(Y) = 30.8148
s1 := stdev(X)*sqrt(n1/k1) = 3.61132
s2 := stdev(Y)*sqrt(n2/k2) = 3.95034
p1 := (1 - p)/2
p2 := (1 + p)/2
Q1 := qchisq(p1, k1)
Q2 := qchisq(p2, k1)
sig1_1 := s1*sqrt(k1/Q1) = 4.98509
sig1_2 := s1*sqrt(k1/Q2) = 2.8322
Q1 := qchisq(p1, k2)
Q2 := qchisq(p2, k2)
sig2_1 := s1*sqrt(k1/Q1) = 4.85295
sig2_2 := s1*sqrt(k1/Q2) = 2.78874
tp := -qt((1 - p)/2, k1)
r1 := tp*s1/sqrt(n1)
beta1_1 := x1 - r1 = 25.4414
beta1_2 := x1 + r1 = 28.3586
tp := -qt((1 - p)/2, k2)
r2 := tp*s2/sqrt(n2)
beta2_1 := y1 - r2 = 29.2521
beta2_2 := y1 + r2 = 32.3775
F1 :=
    if s1 > s2
        s1^2/s2^2
    if s2 ≥ s1
        s2^2/s1^2
    = 1.19657
K1 :=
    if s1 > s2
        k1
    if s2 ≥ s1
        k2
K2 :=
    if s2 > s1
        k1
    if s1 ≥ s2
        k2
F1 = 1.19657
F2 := qF(1 - α/2, K1, K2)
F2 = 2.21921
Flag :=
    if F1 > F2
        "No"
    if F2 ≥ F1
        "Yes"
Flag = "Yes"
SSV := (s1^2*k1 + s2^2*k2)/(k1 + k2)
SSV := sqrt(SSV)
SSV = 3.78794
T1 := |x1 - y1|/(SSV*sqrt(1/n1 + 1/n2))
T1 = 3.7613
T2 := -qt((1 - p)/2, k1 + k2)
T2 = 2.00758
Flag :=
    if T1 > T2
        "No"
    if T2 ≥ T1
        "Yes"
    = "No"
Flag = "No"
YSV := (x1*n1 + y1*n2)/(n1 + n2)
YSV = 28.8943
z := stack(X, Y)
SOB := stdev(z)*sqrt(length(z)/(length(z) - 1))
SOB = 4.23985
χ := qchisq(p, 5)
χ = 11.0705
