X := READPRN("X.prn")
Y_raw := READPRN("Y.prn")
r_count := rows(Y_raw) = 10
X = [5; 25; 35; 40; 45; 50; 60; 65; 80; 95]
Y_raw = [
    52, 51, 52, 52, 52;
    90, 90, 88, 0, 0;
    102, 104, 102, 105, 103;
    110, 109, 106, 106, 0;
    111, 113, 112, 0, 0;
    114, 115, 112, 0, 0;
    119, 119, 117, 117, 0;
    117, 118, 118, 120, 116;
    112, 115, 110, 0, 0;
    98, 97, 97, 100, 97
]
Y :=
    for i ∈ 1 .. 10
        y_row ← Y_raw[i - 1, :]
        Y[i] ← mean(y_row)
    Y ← [Y[1]; Y[2]; Y[3]; Y[4]; Y[5]; Y[6]; Y[7]; Y[8]; Y[9]; Y[10]]
Y = [51.8; 53.6; 103.2; 86.2; 67.2; 68.2; 94.4; 117.8; 67.4; 97.8]
slope(X, Y) = 0.43472
intercept(X, Y) = 59.024
Z1 := regress(X, Y, 2) = [3; 3; 2; 43.9017; 1.21816; -0.00769585]
Z2 := regress(X, Y, 3) = [3; 3; 3; 42.3793; 1.40787; -0.0125451; 3.27037e-5]
F(w, u) := [e^(u[0]*w + u[1]); w*e^(u[0]*w + u[1]); e^(u[0]*w + u[1])]
vb := [1; 1]
p := genfit(X, Y, vb, F)
p = [0.00490394; 4.13946]
g(x) := F(x, p)[0]
i := 1 .. 10
# [plot: Y[i], g(X[i]) vs X[i]]
# [plot: e^(p[0]*X[i] + p[1]) - Y[i] vs X[i]]
n := 10
p := 0.95
w := [1; 1; 1; 1; 1; 1; 1; 1; 1; 1]
a1 := [
    sum(X[i]^2*w[i], i = 0 .. n - 1), sum(X[i]*w[i], i = 0 .. n - 1);
    sum(X[i]*w[i], i = 0 .. n - 1), sum(w[i], i = 0 .. n - 1)
]
a2 := [sum(X[i]*w[i]*Y[i], i = 0 .. n - 1); sum(w[i]*Y[i], i = 0 .. n - 1)]
a := lsolve(a1, a2)
a = [0.43472; 59.024]
b := a1^-1
A1 := [
    sum(X[i]^4*w[i], i = 0 .. n - 1), sum(X[i]^3*w[i], i = 0 .. n - 1), sum(X[i]^2*w[i], i = 0 .. n - 1);
    sum(X[i]^3*w[i], i = 0 .. n - 1), sum(X[i]^2*w[i], i = 0 .. n - 1), sum(X[i]*w[i], i = 0 .. n - 1);
    sum(X[i]^2*w[i], i = 0 .. n - 1), sum(X[i]*w[i], i = 0 .. n - 1), sum(w[i], i = 0 .. n - 1)
]
A2 := [
    sum(X[i]^2*w[i]*Y[i], i = 0 .. n - 1);
    sum(X[i]*w[i]*Y[i], i = 0 .. n - 1);
    sum(w[i]*Y[i], i = 0 .. n - 1)
]
A := lsolve(A1, A2)
A = [-0.00769585; 1.21816; 43.9017]
B := A1^-1
Sad1 := sum((a[0]*X[i] + a[1] - Y[i])^2*w[i], i = 0 .. n - 1)
Sad1 := 1/(n - 2)*Sad1 = 412.106
Sad1 = 412.106
Sad2 := sum((A[0]*X[i]^2 + A[1]*X[i] + A[2] - Y[i])^2*w[i], i = 0 .. n - 1)
Sad2 := 1/(n - 3)*Sad2
Sad2 = 423.621
SSV := sum(sum((Y_raw[i, j] - Y[i]^2)*w[i], j = 0 .. w[i] - 1)/sum(w[i], i = 0 .. n - 1), i = 0 .. n - 1)
SSV = -6867.48
F1 := Sad1/SSV
F1 = -0.0600084
F2 := Sad2/SSV
F2 = -0.0616851
Fkv1 := qF(p, n - 2, sum(w[i], i = 0 .. n - 1))
Fkv1 = 3.07166
Fkv2 := qF(p, n - 3, sum(w[i], i = 0 .. n - 1))
Fkv2 = 3.13546
FlagLi1 :=
    if (Sad1 < SSV)
        "Yes"
    if (Sad1 > SSV)
        "No"
FlagLi2 :=
    if (Sad1 < SSV)
        "Yes"
    if (Sad2 > SSV)
        "No"
Flagsq1 :=
    if (Sad2 < SSV)
        "Yes"
    if (Sad2 > SSV)
        "No"
Flagsq2 :=
    if (F2 < Fkv2)
        "Yes"
    if (F2 > Fkv2)
        "No"
FlagLi :=
    if (FlagLi1 == "Yes")
        "Yes"
    if (FlagLi1 ≠ "Yes")
        FlagLi2
FlagSq :=
    if (Flagsq1 == "Yes")
        "Yes"
    if Flagsq1 ≠ "Yes"
        Flagsq2
FlagLi = "No"
FlagSq = "Yes"
s11 := sqrt(Sad1)*sqrt(b[0, 0])
s11 = 0.256782
s12 := sqrt(Sad1)*sqrt(B[1, 1])
s21 := sqrt(Sad2)*sqrt(b[0, 0])
s21 = 0.260345
s22 := sqrt(Sad2)*sqrt(B[1, 1])
s23 := sqrt(Sad2)*sqrt(B[2, 2])
s12 = 0.910465
s22 = 0.923097
s23 = 22.4509
t11 := a[0]/s11
t12 := a[1]/s12
t21 := A[0]/s21
t22 := A[1]/s22
t23 := A[2]/s23
Tkv1 := -qt((1 - p)/2, n - 2)
Tkv1 = 2.306
Tkv2 := -qt((1 - p)/2, n - 3)
Tkv2 = 2.36462
Flag11 :=
    if (|t11| < Tkv1)
        "a1_Znachim"
    if (|t11| > Tkv1)
        "a1_Ne_Znachim"
Flag12 :=
    if (|t12| < Tkv1)
        "a2_Znachim"
    if (|t12| > Tkv1)
        "a2_Ne_Znachim"
Flag21 :=
    if (|t21| > Tkv2)
        "A1_Znachim"
    if (|t21| < Tkv2)
        "A_Ne_Znachim"
Flag22 :=
    if (|t22| > Tkv2)
        "A2_Znachim"
    if (|t22| < Tkv2)
        "A2_Ne_Znachim"
Flag23 :=
    if (|t23| > Tkv2)
        "A2_Znachim"
    if (|t23| < Tkv2)
        "A2_Ne_Znachim"
Flag11 = "a1_Znachim"
Flag12 = "a2_Ne_Znachim"
Flag21 = "A_Ne_Znachim"
Flag22 = "A2_Ne_Znachim"
Flag23 = "A2_Ne_Znachim"
