X := READPRN("X.prn")
Y := READPRN("Y.prn")
X = [-3, 1, 2, -5, -4, 9, -1, 5, 7]
Y = [5.3, 3.7, 3.9, 6.1, 5.5, 2, 4.4, 3.3, 2.8]
n := 9
x1 := mean(X)
y1 := mean(Y)
x1 = 1.22222
y1 = 4.11111
sx := stdev(X)*sqrt(n/(n - 1))
sy := stdev(Y)*sqrt(n/(n - 1))
R := corr(X, Y)
R = -0.981871
f1(x) := y1 + R*sy/sx*(x - x1)
f2(x) := y1 + 1/R*sy/sx*(x - x1)
X := transpose(X)
Y := transpose(Y)
i := 0 .. 8
# [plot: Y[i], f1(r), f2(q) vs X[i], r, q]
t1 := |R*sqrt((n - 2)/(1 - R^2))|
t1 = 13.7049
t2 := -qt(0.025, n - 2)
t2 = 2.36462
Flag :=
    if (t1 > t2)
        "Znachim"
    if (t1 < t2)
        "Ne_Znachim"
Flag = "Znachim"
Z := 0.5*ln((1 + R)/(1 - R))
Z = -2.34714
Sz := sqrt(1/(n - 3))
Sz = 0.408248
u := qnorm(0.975, 0, 1)
u = 1.95996
r1 := tanh(Z - u*Sz)
r1 = -0.996314
r2 := tanh(Z + u*Sz)
r2 = -0.913287
Flag :=
    if (r1 > 0) or (r2 < 0)
        "Linei"
    if (r1 < 0) and (r2 > 0)
        "Ne_Linei"
Flag = "Linei"
